Norm(v) := v/|v|
a := [1; 1; 1]
b := [1; 1; 1]
SurfaceCenter := Norm([0; 0; 1.679]) = [0; 0; 1]
A_1 := Norm([0.649; 0; 1.679]) = [0.360542; 0; 0.932743]
A_2 := Norm([0.201; 1.679; 0.618]) = [0.111643; 0.932581; 0.343261]
A_1×SurfaceCenter = [0; -0.360542; 0]
A_1 - SurfaceCenter = [0.360542; 0; -0.0672571]
A_2×SurfaceCenter = [0.932581; -0.111643; 0]
Norm(A_1 - SurfaceCenter)*Norm(A_1) = 0.183381
(A_2 - SurfaceCenter)*A_2 = 0.656739
(A_2 - SurfaceCenter)*(A_2×SurfaceCenter) = 0
Norm(A_1 - SurfaceCenter)*Norm(A_1×SurfaceCenter) = 0
R5 := [0; 0; 1.68]
X5 := [0.65, 0.2, -0.53, -0.53, 0.2; 0, 0.62, 0.38, -0.38, -0.62; 1.68, 1.68, 1.68, 1.68, 1.68]
R6 := [-0.32; 1.27; 0.98]
X6 := [
    0.2, -0.53, -0.98, -0.8, -0.17, 0.37;
    1.68, 1.68, 1.33, 0.8, 0.8, 1.33;
    0.62, 0.38, 0.71, 1.39, 1.6, 1.15
]
X := X6
N := [0; -1; 0]
R := R6
T_R := R*(R/|R|*N/|R|) = [0.151885; -0.602796; -0.465149]
T_N := N*|R/|R|×(N/|N|)| = [0; -0.630242; 0]
T := N - T_R = [-0.151885; -0.397204; 0.465149]
T/|T| = [-0.240996; -0.630242; 0.738049]
[1, 0, 0, 0; 0, 1, 0, 0; 0, 0, 1, -4; 0, 0, 0, 1]*[0; 0; 0; 1] = [0; 0; -4; 1]
T*R = 2.77556e-16
texCord(X, R) :=
    T_R ← R*(R/|R|*N/|R|)
    T ← N - T_R
    [1/2*T/|T|*(X - R)/|X - R| + 1/2; 1/2*(R/|R|×(T/|T|))*(X - R)/|X - R| + 1/2]
Tx :=
    for i ∈ 0 .. cols(X) - 1
        t ← texCord(X[:, i + ORIGIN], R)
        for j ∈ 0 .. rows(t) - 1
            tex[ORIGIN + j, ORIGIN + i] ← t[ORIGIN + j]
    tex
    = [
        0.0691961, 0.0699458, 0.44548, 0.953922, 0.952871, 0.44487;
        0.753787, 0.244944, 0.00307677, 0.290967, 0.711425, 0.996862
    ]
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